*Heading
** Job name: Job-1 Model name: Model-1
** Generated by: Abaqus/CAE 6.12-3
*Preprint, echo=NO, model=NO, history=NO, contact=NO
**
** PARTS
**
*Part, name=Part-1
*End Part
**
**
** ASSEMBLY
**
*Assembly, name=Assembly
**
*Instance, name=Part-1-1, part=Part-1
*Node
      1,           0., -0.200000003
      2,           0., -0.0500000007
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*Element, type=CPS4R
 1, 16,  1, 17, 68
 2, 68, 17, 18, 67
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*Nset, nset=Set-1, generate
   1,  128,    1
*Elset, elset=Set-1, generate
   1,  104,    1
*Nset, nset=bottom
  1,  5,  6, 13, 14, 15, 16, 31, 32, 33, 34
*Elset, elset=bottom
  1, 14, 18, 22, 26, 31, 32, 33, 34, 35
*Nset, nset=top
 10, 11, 12, 48, 49, 50, 51, 56, 57, 58, 59
*Elset, elset=top
  57,  58,  59,  60,  61,  79,  92,  96, 100, 104
** Section: Section-1
*Solid Section, elset=Set-1, material=Material-1
,
*End Instance
**
*End Assembly
**
** MATERIALS
**
*Material, name=Material-1
*Elastic
210., 0.3
