*Heading
** Job name: Job-3 Model name: Model-1
** Generated by: Abaqus/CAE 6.12-3
*Preprint, echo=NO, model=NO, history=NO, contact=NO
**
** PARTS
**
*Part, name=Part-1
*End Part
**
**
** ASSEMBLY
**
*Assembly, name=Assembly
**
*Instance, name=Part-1-1, part=Part-1
*Node
      1,           6.,           4.
      2,           6.,           0.
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*Element, type=CPS4R
  1,  13,  14, 134, 131
  2,  14,  15, 133, 134
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*Nset, nset=Set-1, generate
   1,  454,    1
*Elset, elset=Set-1, generate
   1,  404,    1
*Nset, nset=bottom
  2,  3,  8, 26, 27, 28
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*Elset, elset=bottom
  13,  22,  31,  40,  41,  42
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*Nset, nset=top
   9,  11,  12,  78,  79,  80
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*Elset, elset=top
 203, 204, 205, 206, 258, 267
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** Section: Section-1
*Solid Section, elset=Set-1, material=Material-1
,
*End Instance
**
*End Assembly
**
** MATERIALS
**
*Material, name=Material-1
*Elastic
210., 0.3
**
** BOUNDARY CONDITIONS
**
** Name: BC-1 Type: Symmetry/Antisymmetry/Encastre
*Boundary
Part-1-1.bottom, ENCASTRE
** ----------------------------------------------------------------
**
** STEP: Step-1
**
*Step, name=Step-1
*Static
1., 1., 1e-05, 1.
**
** BOUNDARY CONDITIONS
**
** Name: BC-2 Type: Displacement/Rotation
*Boundary
Part-1-1.top, 1, 1
Part-1-1.top, 2, 2, 3.
Part-1-1.top, 6, 6
**
** OUTPUT REQUESTS
**
*Restart, write, frequency=0
**
** FIELD OUTPUT: F-Output-1
**
*Output, field, variable=PRESELECT
**
** HISTORY OUTPUT: H-Output-1
**
*Output, history, variable=PRESELECT
*End Step
